variable temp equal 300

units          real
dimension      3
boundary       p p p
atom_style  full

pair_style table linear 1999
bond_style table linear 1999
angle_style table linear 1999
read_data tmp.dat
#replicate 2 2 2 bond/periodic

#kspace_style pppm 1.0e-4

pair_coeff 1 1 pot.table pair_11
pair_coeff 1 2 pot.table pair_12
pair_coeff 1 3 pot.table pair_13
pair_coeff 2 2 pot.table pair_22
pair_coeff 2 3 pot.table pair_23
pair_coeff 3 3 pot.table pair_33
bond_coeff 1 pot.table bond_1
bond_coeff 2 pot.table bond_2
bond_coeff 3 pot.table bond_3
angle_coeff 1 pot.table angle_1
angle_coeff 2 pot.table angle_2
angle_coeff 3 pot.table angle_3

special_bonds lj 0 1 1

# neighbor        5.0 bin
neigh_modify    delay 0 every 1 check yes

dump 1 all custom 100 dump.xyz id type x y z
dump_modify 1 sort id

# Settings
velocity       all create ${temp} 4928459 dist gaussian
fix            1 all npt temp ${temp} ${temp} 100 iso 1 1 1000
#fix            1 all nvt temp ${temp} ${temp} 100
timestep       1

# Output
thermo         100
thermo_style    custom step temp density press pxx pyy pzz pxy pxz pyz ke pe etotal vol lx ly lz

# Run the simulation
run            1000000

write_data      out.dat
